# OpenSim document version 40000
InverseKinematicsTool Subject1_trial4:
  model_file: ../Models/optimized_scale_and_markers.osim
  marker_file: ../MarkerData/Subject1_trial4.trc
  output_motion_file: Subject1_trial4_ik_by_opensim.mot
  accuracy: 1e-5
  report_errors: true
  IKTaskSet IK_tasks:
    IKMarkerTask CLAV: weight=1 apply=true
    IKMarkerTask LANK: weight=1 apply=true
    IKMarkerTask LASI: weight=1 apply=true
    IKMarkerTask LCAL: weight=1 apply=true
    IKMarkerTask LGTRO: weight=1 apply=true
    IKMarkerTask LHEEL: weight=1 apply=true
    IKMarkerTask LHEEU: weight=1 apply=true
    IKMarkerTask LKNE: weight=1 apply=true
    IKMarkerTask LMT1: weight=1 apply=true
    IKMarkerTask LMT5: weight=1 apply=true
    IKMarkerTask LPSI: weight=1 apply=true
    IKMarkerTask LSHO: weight=1 apply=true
    IKMarkerTask LTHI: weight=1 apply=true
    IKMarkerTask LTIB: weight=1 apply=true
    IKMarkerTask LTOE: weight=1 apply=true
    IKMarkerTask NAVE: weight=1 apply=true
    IKMarkerTask RANK: weight=1 apply=true
    IKMarkerTask RASI: weight=1 apply=true
    IKMarkerTask RCAL: weight=1 apply=true
    IKMarkerTask RGTRO: weight=1 apply=true
    IKMarkerTask RHEEL: weight=1 apply=true
    IKMarkerTask RHEEU: weight=1 apply=true
    IKMarkerTask RKNE: weight=1 apply=true
    IKMarkerTask RMT1: weight=1 apply=true
    IKMarkerTask RMT5: weight=1 apply=true
    IKMarkerTask RPSI: weight=1 apply=true
    IKMarkerTask RSHO: weight=1 apply=true
    IKMarkerTask RTHI: weight=1 apply=true
    IKMarkerTask RTIB: weight=1 apply=true
    IKMarkerTask RTOE: weight=1 apply=true
    IKMarkerTask SACR: weight=1 apply=true
    IKMarkerTask STRN: weight=1 apply=true
    IKMarkerTask T10: weight=1 apply=true
