# OpenSim document version 40000
Model optimized_scale_and_markers:
  gravity: 0 -9.80665 0
  length_units: meters
  force_units: N
  credits:
    A planar reduced gait model with 10 degrees of freedom and 18 muscles by Ajay Seth. Closely based on Delp S.L., Loan J.P., Hoy M.G., Zajac F.E., Topp E.L., Rosen J.M., Thelen D.G., Anderson F.C., Seth A. Notes: 3D, 23 DOF gait model created by D.G. Thelen, Univ. of Wisconsin-Madison, and Ajay Seth, Frank C. Anderson, and Scott L. Delp, Stanford University. Lower extremity joint defintions based on Delp et al. (1990). Low back joint and anthropometry based on Anderson and Pandy (1999, 2001). Planar knee model of Yamaguchi and Zajac (1989). Seth replaced tibia translation constraints with a CustomJoint for the knee and removed the patella to eliminate all kinematic constraints; insertions of the quadrucepts are handled with moving points in the tibia frame as defined by Delp 1990. Number of muscles was reduced by Anderson to improve simulation speed for demonstrations and is not intended to be used in research. License: Creative Commons (CCBY 3.0). You are free to distribute, remix, tweak, and build upon this work, even commercially, as long as you credit us for the original creation. http://creativecommons.org/licenses/by/3.0/ More Information: http://simtk-confluence.stanford.edu:8080/display/OpenSim/Gait+2392+and+2354+Models
  publications:
    Delp, S.L., Loan, J.P., Hoy, M.G., Zajac, F.E., Topp E.L., Rosen, J.M.: An interactive graphics-based model of the lower extremity to study orthopaedic surgical procedures, IEEE Transactions on Biomedical Engineering, vol. 37, pp. 757-767, 1990. Yamaguchi G.T., Zajac F.E.: A planar model of the knee joint to characterize the knee extensor mechanism." J . Biomech. vol. 22. pp. 1-10. 1989. Anderson F.C., Pandy M.G.: A dynamic optimization solution for vertical jumping in three dimensions. Computer Methods in Biomechanics and Biomedical Engineering 2:201-231, 1999. Anderson F.C., Pandy M.G.: Dynamic optimization of human walking. Journal of Biomechanical Engineering 123:381-390, 2001.
  SmoothSphereHalfSpaceForce contactHeel_r: socket_sphere=/contactgeometryset/heel_r
      socket_half_space=/contactgeometryset/floor stiffness=3067776 [N/m^2] dissipation=2 [s/m] static_friction=0.8
      dynamic_friction=0.8 viscous_friction=0.5 transition_velocity=0.2 [m/s] hertz_smoothing=300
      hunt_crossley_smoothing=50
  SmoothSphereHalfSpaceForce contactHeel_l: socket_sphere=/contactgeometryset/heel_l
      socket_half_space=/contactgeometryset/floor stiffness=3067776 dissipation=2 static_friction=0.8
      dynamic_friction=0.8 viscous_friction=0.5 transition_velocity=0.2 hertz_smoothing=300 hunt_crossley_smoothing=50
  SmoothSphereHalfSpaceForce contactFront_r: socket_sphere=/contactgeometryset/front_r
      socket_half_space=/contactgeometryset/floor stiffness=3067776 dissipation=2 static_friction=0.8
      dynamic_friction=0.8 viscous_friction=0.5 transition_velocity=0.2 hertz_smoothing=300 hunt_crossley_smoothing=50
  SmoothSphereHalfSpaceForce contactFront_l: socket_sphere=/contactgeometryset/front_l
      socket_half_space=/contactgeometryset/floor stiffness=3067776 dissipation=2 static_friction=0.8
      dynamic_friction=0.8 viscous_friction=0.5 transition_velocity=0.2 hertz_smoothing=300 hunt_crossley_smoothing=50
  Ground
  BodySet:
    Body pelvis: mass=6.346175 [kg] mass_center=(-0.05997992 0 0) inertia=(0.04842507 0.04842507 0.02386886 0 0 0)
        meshes=(sacrum.vtp pelvis.vtp l_pelvis.vtp)
    Body femur_r: mass=7.137498 mass_center=(0 -0.1700226 0) inertia=(0.103353 0.02809442 0.103353 0 0 0)
        meshes=femur_r.vtp
      WrapCylinder TRO_r: xyz_body_rotation=(0.35015 -0.352832 0.54985)
          translation=(-0.008121946 -0.008001062 0.02054826) quadrant=all radius=0.02524641 length=0.1330121
    Body tibia_r: mass=2.311041 mass_center=(0 -0.1792993 0) inertia=(0.02891173 0.002805202 0.02891173 0 0 0)
        meshes=(tibia_r.vtp fibula.vtp)
    Body talus_r: mass=0.1153265 mass_center=(0 0 0) inertia=(0.001571575 0.001549087 0.001549087 0 0 0)
        meshes=talus.vtp
    Body calcn_r: mass=1.481478 mass_center=(0.1176743 0.03498052 0)
        inertia=(0.002271912 0.006387641 0.006387641 0 0 0) meshes=foot.vtp
    Body toes_r: mass=0.1980009 mass_center=(0.03742576 0.006432398 -0.01875452)
        inertia=(0.0001050263 0.0002129445 0.0002129445 0 0 0) meshes=bofoot.vtp
    Body femur_l: mass=7.137498 mass_center=(0 -0.1700226 0) inertia=(0.103353 0.02809442 0.103353 0 0 0)
        meshes=femur_l.vtp
      WrapCylinder TRO_l: xyz_body_rotation=(-0.35015 0.352832 0.54985)
          translation=(-0.008121946 -0.008001062 -0.02054826) quadrant=all radius=0.02524641 length=0.1330121
    Body tibia_l: mass=2.311041 mass_center=(0 -0.1792993 0) inertia=(0.02891173 0.002805202 0.02891173 0 0 0)
        meshes=(tibia_l.vtp l_fibula.vtp)
    Body talus_l: mass=0.1153265 mass_center=(0 0 0) inertia=(0.001571575 0.001549087 0.001549087 0 0 0)
        meshes=l_talus.vtp
    Body calcn_l: mass=1.481478 mass_center=(0.1176743 0.03498052 0)
        inertia=(0.002271912 0.006387641 0.006387641 0 0 0) meshes=l_foot.vtp
    Body toes_l: mass=0.1980009 mass_center=(0.03742576 0.006432398 0.01875452)
        inertia=(0.0001050263 0.0002129445 0.0002129445 0 0 0) meshes=l_bofoot.vtp
    Body torso: mass=26.66714 mass_center=(-0.0332729 0.2992537 0) inertia=(1.080256 0.6663333 1.080256 0 0 0)
        meshes=(hat_spine.vtp hat_jaw.vtp hat_skull.vtp hat_ribs.vtp)
  JointSet:
    CustomJoint ground_pelvis: socket_parent_frame=ground_offset socket_child_frame=pelvis_offset
      Coordinate pelvis_tilt: default_value=0 range=(-1.570796 1.570796) clamped=false
      Coordinate pelvis_tx: default_value=0 range=(-5 5) clamped=false
      Coordinate pelvis_ty: default_value=0.95 range=(-1 2) clamped=false
      PhysicalOffsetFrame ground_offset: socket_parent=/ground translation=(0 0.95 0) [meters]
      PhysicalOffsetFrame pelvis_offset: socket_parent=/bodyset/pelvis translation=(0 0 0)
      SpatialTransform: axes_held_at_zero=(rotation2 rotation3 translation3)
        TransformAxis rotation1: coordinates=pelvis_tilt axis=(0 0 1) LinearFunction(coefficients=1 0)
        TransformAxis translation1: coordinates=pelvis_tx axis=(1 0 0) LinearFunction(coefficients=1 0)
        TransformAxis translation2: coordinates=pelvis_ty axis=(0 1 0)
            MultiplierFunction(scale=1, LinearFunction(coefficients=1 -0.95))
    PinJoint hip_r: socket_parent_frame=pelvis_offset socket_child_frame=femur_r_offset
      Coordinate hip_flexion_r: default_value=0 range=(-2.094395 2.094395) clamped=false
      PhysicalOffsetFrame pelvis_offset: socket_parent=/bodyset/pelvis translation=(-0.05997992 -0.0596061 0.07995825)
      PhysicalOffsetFrame femur_r_offset: socket_parent=/bodyset/femur_r translation=(0 0 0)
    CustomJoint knee_r: socket_parent_frame=femur_r_offset socket_child_frame=tibia_r_offset
      Coordinate knee_angle_r: default_value=0 range=(-2.094395 0.1745329) clamped=false
      PhysicalOffsetFrame femur_r_offset: socket_parent=/bodyset/femur_r translation=(-0.004568449 -0.3958733 0)
      PhysicalOffsetFrame tibia_r_offset: socket_parent=/bodyset/tibia_r translation=(0 0 0)
      SpatialTransform: axes_held_at_zero=(rotation2 rotation3 translation3)
        TransformAxis rotation1: coordinates=knee_angle_r axis=(0 0 1) LinearFunction(coefficients=1 0)
        TransformAxis translation1: coordinates=knee_angle_r axis=(1 0 0)
          MultiplierFunction: scale=1.015243
            SimmSpline: x=(-2.0944 -1.74533 -1.39626 -1.0472 -0.698132 -0.349066 -0.174533 0.197344 0.337395 0.490178 1.52146 2.0944)
                y=(0.00129986 0.00628986 0.00860986 0.00859986 0.00661986 0.00349986 0.00139986 -0.000727144 -0.000935143 -0.00107414 -0.000935143 -0.000750144)
        TransformAxis translation2: coordinates=knee_angle_r axis=(0 1 0)
          MultiplierFunction: scale=1.000133
            SimmSpline: x=(-2.0944 -1.22173 -0.523599 -0.349066 -0.174533 0.159149 2.0944)
                y=(-0.0267793 -0.0123793 -0.0031793 -0.0017793 -0.000779304 0.000556696 -0.000179304)
    PinJoint ankle_r: socket_parent_frame=tibia_r_offset socket_child_frame=talus_r_offset
      Coordinate ankle_angle_r: default_value=0 range=(-1.570796 1.570796) clamped=false
      PhysicalOffsetFrame tibia_r_offset: socket_parent=/bodyset/tibia_r translation=(0 -0.412955 0)
      PhysicalOffsetFrame talus_r_offset: socket_parent=/bodyset/talus_r translation=(0 0 0)
    WeldJoint subtalar_r: socket_parent_frame=talus_r_offset socket_child_frame=calcn_r_offset
      PhysicalOffsetFrame talus_r_offset: socket_parent=/bodyset/talus_r
          translation=(-0.05611137 -0.0492031 0.009201758)
      PhysicalOffsetFrame calcn_r_offset: socket_parent=/bodyset/calcn_r translation=(0 0 0)
    WeldJoint mtp_r: socket_parent_frame=calcn_r_offset socket_child_frame=toes_r_offset
      PhysicalOffsetFrame calcn_r_offset: socket_parent=/bodyset/calcn_r
          translation=(0.2104017 -0.002332035 0.001268228)
      PhysicalOffsetFrame toes_r_offset: socket_parent=/bodyset/toes_r translation=(0 0 0)
    PinJoint hip_l: socket_parent_frame=pelvis_offset socket_child_frame=femur_l_offset
      Coordinate hip_flexion_l: default_value=0 range=(-2.094395 2.094395) clamped=false
      PhysicalOffsetFrame pelvis_offset: socket_parent=/bodyset/pelvis translation=(-0.05997992 -0.0596061 -0.07995825)
      PhysicalOffsetFrame femur_l_offset: socket_parent=/bodyset/femur_l translation=(0 0 0)
    CustomJoint knee_l: socket_parent_frame=femur_l_offset socket_child_frame=tibia_l_offset
      Coordinate knee_angle_l: default_value=0 range=(-2.094395 0.1745329) clamped=false
      PhysicalOffsetFrame femur_l_offset: socket_parent=/bodyset/femur_l translation=(-0.004568449 -0.3958733 0)
      PhysicalOffsetFrame tibia_l_offset: socket_parent=/bodyset/tibia_l translation=(0 0 0)
      SpatialTransform: axes_held_at_zero=(rotation2 rotation3 translation3)
        TransformAxis rotation1: coordinates=knee_angle_l axis=(0 0 1) LinearFunction(coefficients=1 0)
        TransformAxis translation1: coordinates=knee_angle_l axis=(1 0 0)
          MultiplierFunction: scale=1.015243
            SimmSpline: x=(-2.0944 -1.74533 -1.39626 -1.0472 -0.698132 -0.349066 -0.174533 0.197344 0.337395 0.490178 1.52146 2.0944)
                y=(0.00129986 0.00628986 0.00860986 0.00859986 0.00661986 0.00349986 0.00139986 -0.000727144 -0.000935143 -0.00107414 -0.000935143 -0.000750144)
        TransformAxis translation2: coordinates=knee_angle_l axis=(0 1 0)
          MultiplierFunction: scale=1.000133
            SimmSpline: x=(-2.0944 -1.22173 -0.523599 -0.349066 -0.174533 0.159149 2.0944)
                y=(-0.0267793 -0.0123793 -0.0031793 -0.0017793 -0.000779304 0.000556696 -0.000179304)
    PinJoint ankle_l: socket_parent_frame=tibia_l_offset socket_child_frame=talus_l_offset
      Coordinate ankle_angle_l: default_value=0 range=(-1.570796 1.570796) clamped=false
      PhysicalOffsetFrame tibia_l_offset: socket_parent=/bodyset/tibia_l translation=(0 -0.412955 0)
      PhysicalOffsetFrame talus_l_offset: socket_parent=/bodyset/talus_l translation=(0 0 0)
    WeldJoint subtalar_l: socket_parent_frame=talus_l_offset socket_child_frame=calcn_l_offset
      PhysicalOffsetFrame talus_l_offset: socket_parent=/bodyset/talus_l
          translation=(-0.05611137 -0.0492031 -0.009201758)
      PhysicalOffsetFrame calcn_l_offset: socket_parent=/bodyset/calcn_l translation=(0 0 0)
    WeldJoint mtp_l: socket_parent_frame=calcn_l_offset socket_child_frame=toes_l_offset
      PhysicalOffsetFrame calcn_l_offset: socket_parent=/bodyset/calcn_l
          translation=(0.2104017 -0.002332035 -0.001268228)
      PhysicalOffsetFrame toes_l_offset: socket_parent=/bodyset/toes_l translation=(0 0 0)
    PinJoint back: socket_parent_frame=pelvis_offset socket_child_frame=torso_offset
      Coordinate lumbar_extension: default_value=0 range=(-1.570796 1.570796) clamped=false locked=true
      PhysicalOffsetFrame pelvis_offset: socket_parent=/bodyset/pelvis translation=(-0.08543109 0.07349315 0)
      PhysicalOffsetFrame torso_offset: socket_parent=/bodyset/torso translation=(0 0 0)
  ForceSet:
    Millard2012EquilibriumMuscle [values shared by the 18 below unless stated]: optimal_force=1
        max_contraction_velocity=10 activation_time_constant=0.01 [seconds] deactivation_time_constant=0.04 [seconds]
        minimum_activation=0.01
      ActiveForceLengthCurve: minimum_value=0
      ForceVelocityCurve: concentric_slope_at_vmax=0 concentric_slope_near_vmax=0.25 isometric_slope=5
          eccentric_slope_at_vmax=0 eccentric_slope_near_vmax=0.15 max_eccentric_velocity_force_multiplier=1.4
      FiberForceLengthCurve
      TendonForceLengthCurve
    Millard2012EquilibriumMuscle hamstrings_r: max_isometric_force=2700 optimal_fiber_length=0.1091783
        tendon_slack_length=0.3265334 pennation_angle_at_optimal=0 [radians]
      PathPoint bifemlh_r-P1: pelvis (-0.106861 -0.09249316 0.06649462)
      PathPoint bifemlh_r-P2: tibia_r (-0.02858984 -0.03457297 0.02734087)
      PathPoint bifemlh_r-P3: tibia_r (-0.02222599 -0.05406829 0.03186517)
      PathWrap: wrap_object=TRO_r method=hybrid
    Millard2012EquilibriumMuscle bifemsh_r: max_isometric_force=804 optimal_fiber_length=0.1711738
        tendon_slack_length=0.08806051 pennation_angle_at_optimal=0.4014257
      PathPoint P1: femur_r (0.005076216 -0.211128 0.02404147)
      PathPoint P2: tibia_r (-0.02858984 -0.03457297 0.02734087)
      PathPoint P3: tibia_r (-0.02222599 -0.05406829 0.03186517)
    Millard2012EquilibriumMuscle glut_max_r: max_isometric_force=1944 optimal_fiber_length=0.1398362
        tendon_slack_length=0.1208109 pennation_angle_at_optimal=0
      PathPoint P1: pelvis (-0.1144454 0.01587091 0.05391197)
      ConditionalPathPoint default: pelvis (-0.116736 -0.04689133 0.08752316)
          socket_coordinate=/jointset/hip_r/hip_flexion_r range=(-0.3490659 2.792527) [radians]
      ConditionalPathPoint default_0: femur_r (-0.04324936 -0.05300704 0.0301032)
          socket_coordinate=/jointset/hip_r/hip_flexion_r range=(-0.3490659 2.792527)
      PathPoint P4: femur_r (-0.01583779 -0.1016135 0.04304861)
      PathWrap: wrap_object=TRO_r method=hybrid
    Millard2012EquilibriumMuscle iliopsoas_r: max_isometric_force=2342 optimal_fiber_length=0.09200056
        tendon_slack_length=0.1472009 pennation_angle_at_optimal=0.1396263
      PathPoint psoas_r-P1: pelvis (-0.05488969 0.07998579 0.02767417)
      ConditionalPathPoint default: pelvis (-0.02019126 -0.05140012 0.07268061)
          socket_coordinate=/jointset/hip_r/hip_flexion_r range=(-2.792527 1.396263)
      ConditionalPathPoint psoas_r-P3: pelvis (-0.02443312 -0.07259139 0.07813884)
          socket_coordinate=/jointset/hip_r/hip_flexion_r range=(-2.792527 0.785398)
      PathPoint psoas_r-P4: femur_r (0.001624389 -0.05070673 0.00390417)
      PathPoint psoas_r-P5: femur_r (-0.01908657 -0.05970793 0.0106851)
      PathWrap: wrap_object=TRO_r method=hybrid
    Millard2012EquilibriumMuscle rect_fem_r: max_isometric_force=1169 optimal_fiber_length=0.1133245
        tendon_slack_length=0.308163 pennation_angle_at_optimal=0.08726646
      PathPoint P1: pelvis (-0.02502698 -0.02804462 0.09269411)
      ConditionalPathPoint P2: femur_r (0.03390912 -0.4030535 0.001952085)
          socket_coordinate=/jointset/knee_r/knee_angle_r range=(-2.61799 -1.45997)
      MovingPathPoint P3: tibia_r socket_x_coordinate=/jointset/knee_r/knee_angle_r
          socket_y_coordinate=/jointset/knee_r/knee_angle_r socket_z_coordinate=/jointset/knee_r/knee_angle_r
        x_location: MultiplierFunction: scale=0.9498287
          SimmSpline: x=(-2.0944 -1.99997 -1.5708 -1.45752 -1.39626 -1.0472 -0.698132 -0.526391 -0.349066 -0.174533 0 0.00017453 0.00034907 0.0279253 0.0872665 0.174533 2.0944)
              y=(0.0155805 0.0179938 0.0275081 0.0296564 0.0307615 0.0365695 0.0422074 0.0450902 0.048391 0.0534299 0.0617576 0.0617669 0.0617762 0.0633083 0.066994 0.0733035 0.0573481)
        y_location: MultiplierFunction: scale=0.9603604
          SimmSpline: x=(-2.0944 -1.99997 -1.5708 -1.45752 -1.39626 -1.0472 -0.698132 -0.526391 -0.349066 -0.174533 0 0.00017453 0.00034907 0.0279253 0.0872665 0.174533 2.0944)
              y=(0.0234116 0.0237613 0.0251141 0.0252795 0.0253146 0.0249184 0.0242373 0.0238447 0.0234197 0.0227644 0.020984 0.0209814 0.0209788 0.0205225 0.0191754 0.0159554 -0.0673774)
        z_location: MultiplierFunction: scale=0.9290137
          SimmSpline: x=(-2.0944 0.1745) y=(0.0014 0.0014)
      PathWrap: wrap_object=TRO_l method=hybrid
    Millard2012EquilibriumMuscle vasti_r: max_isometric_force=5000 optimal_fiber_length=0.08741497
        tendon_slack_length=0.1366487 pennation_angle_at_optimal=0.05235988
      PathPoint vas_int_r-P1: femur_r (0.02944205 -0.1924255 0.03184981)
      PathPoint vas_int_r-P2: femur_r (0.03401065 -0.2084277 0.02928127)
      ConditionalPathPoint vas_int_r-P3: femur_r (0.03482284 -0.4030535 0.005650772)
          socket_coordinate=/jointset/knee_r/knee_angle_r range=(-2.61799 -1.42)
      MovingPathPoint vas_int_r-P4: tibia_r socket_x_coordinate=/jointset/knee_r/knee_angle_r
          socket_y_coordinate=/jointset/knee_r/knee_angle_r socket_z_coordinate=/jointset/knee_r/knee_angle_r
        x_location: MultiplierFunction: scale=0.9498287
          SimmSpline: x=(-2.0944 -1.99997 -1.5708 -1.45752 -1.39626 -1.0472 -0.698132 -0.526391 -0.349066 -0.174533 0 0.00017453 0.00034907 0.0279253 0.0872665 0.174533 2.0944)
              y=(0.0082733 0.0106866 0.0202042 0.022353 0.0234583 0.0292715 0.0349465 0.037871 0.0412569 0.0465287 0.0554632 0.0554735 0.0554837 0.0571717 0.061272 0.0684368 0.0648818)
        y_location: MultiplierFunction: scale=0.9603604
          SimmSpline: x=(-2.0944 -1.99997 -1.5708 -1.45752 -1.39626 -1.0472 -0.698132 -0.526391 -0.349066 -0.174533 0 0.00017453 0.00034907 0.0279253 0.0872665 0.174533 2.0944)
              y=(0.025599 0.0259487 0.0273124 0.0274796 0.0275151 0.0271363 0.0265737 0.0263073 0.0261187 0.0260129 0.0252923 0.0252911 0.0252898 0.0250526 0.0242191 0.0218288 -0.0685706)
        z_location: MultiplierFunction: scale=0.9290137
          SimmSpline: x=(-2.0944 2.0944) y=(0.0018 0.0018)
    Millard2012EquilibriumMuscle gastroc_r: max_isometric_force=2500 optimal_fiber_length=0.05810533
        tendon_slack_length=0.3776846 pennation_angle_at_optimal=0.296706
      PathPoint med_gas_r-P1: femur_r (-0.01928962 -0.3929522 -0.02414421)
      ConditionalPathPoint med_gas_r-P2: femur_r (-0.0304573 -0.4022534 -0.02650726)
          socket_coordinate=/jointset/knee_r/knee_angle_r range=(-0.785398 0.174533)
      PathPoint med_gas_r-P3: calcn_r (0 0.03614654 -0.00622371)
    Millard2012EquilibriumMuscle soleus_r: max_isometric_force=5137 optimal_fiber_length=0.04872392
        tendon_slack_length=0.2436196 pennation_angle_at_optimal=0.4363323
      PathPoint P1: tibia_r (-0.002279589 -0.1472232 0.006595998)
      PathPoint P2: calcn_r (0 0.03614654 -0.00622371)
    Millard2012EquilibriumMuscle tib_ant_r: max_isometric_force=3000 optimal_fiber_length=0.09863078
        tendon_slack_length=0.2244353 pennation_angle_at_optimal=0.08726646
      PathPoint P1: tibia_r (0.01700193 -0.1559625 0.01068366)
      PathPoint P2: tibia_r (0.03124936 -0.3794384 -0.01644354)
      PathPoint P3: calcn_r (0.1372083 0.02075511 -0.03581569)
    Millard2012EquilibriumMuscle hamstrings_l: max_isometric_force=2700 optimal_fiber_length=0.1091783
        tendon_slack_length=0.3265334 pennation_angle_at_optimal=0
      PathPoint bifemlh_l-P1: pelvis (-0.106861 -0.09249316 -0.06649462)
      PathPoint bifemlh_l-P2: tibia_l (-0.02858984 -0.03457297 -0.02734087)
      PathPoint bifemlh_l-P3: tibia_l (-0.02222599 -0.05406829 -0.03186517)
      PathWrap: wrap_object=TRO_l method=hybrid
    Millard2012EquilibriumMuscle bifemsh_l: max_isometric_force=804 optimal_fiber_length=0.1711738
        tendon_slack_length=0.08806051 pennation_angle_at_optimal=0.4014257
      PathPoint P1: femur_l (0.005076216 -0.211128 -0.02404147)
      PathPoint P2: tibia_l (-0.02858984 -0.03457297 -0.02734087)
      PathPoint P3: tibia_l (-0.02222599 -0.05406829 -0.03186517)
    Millard2012EquilibriumMuscle glut_max_l: max_isometric_force=1944 optimal_fiber_length=0.1398362
        tendon_slack_length=0.1208109 pennation_angle_at_optimal=0
      PathPoint P1: pelvis (-0.1144454 0.01587091 -0.05391197)
      ConditionalPathPoint default: pelvis (-0.116736 -0.04689133 -0.08752316)
          socket_coordinate=/jointset/hip_l/hip_flexion_l range=(-0.3490659 2.792527)
      ConditionalPathPoint default_0: femur_l (-0.04324936 -0.05300704 -0.0301032)
          socket_coordinate=/jointset/hip_l/hip_flexion_l range=(-0.3490659 2.792527)
      PathPoint P4: femur_l (-0.01583779 -0.1016135 -0.04304861)
      PathWrap: wrap_object=TRO_l method=hybrid
    Millard2012EquilibriumMuscle iliopsoas_l: max_isometric_force=2342 optimal_fiber_length=0.09200056
        tendon_slack_length=0.1472009 pennation_angle_at_optimal=0.1396263
      PathPoint psoas_l-P1: pelvis (-0.05488969 0.07998579 -0.02767417)
      ConditionalPathPoint default: pelvis (-0.02019126 -0.05140012 -0.07268061)
          socket_coordinate=/jointset/hip_l/hip_flexion_l range=(-2.792527 1.396263)
      ConditionalPathPoint psoas_l-P3: pelvis (-0.02443312 -0.07259139 -0.07813884)
          socket_coordinate=/jointset/hip_l/hip_flexion_l range=(-2.792527 0.785398)
      PathPoint psoas_l-P4: femur_l (0.001624389 -0.05070673 -0.00390417)
      PathPoint psoas_l-P5: femur_l (-0.01908657 -0.05970793 -0.0106851)
      PathWrap: wrap_object=TRO_l method=hybrid
    Millard2012EquilibriumMuscle rect_fem_l: max_isometric_force=1169 optimal_fiber_length=0.1133245
        tendon_slack_length=0.308163 pennation_angle_at_optimal=0.08726646
      PathPoint P1: pelvis (-0.02502698 -0.02804462 -0.09269411)
      ConditionalPathPoint P2: femur_l (0.03390912 -0.4030535 -0.001952085)
          socket_coordinate=/jointset/knee_l/knee_angle_l range=(-2.61799 -1.45997)
      MovingPathPoint P3: tibia_l socket_x_coordinate=/jointset/knee_l/knee_angle_l
          socket_y_coordinate=/jointset/knee_l/knee_angle_l socket_z_coordinate=/jointset/knee_l/knee_angle_l
        x_location: MultiplierFunction: scale=0.9498287
          SimmSpline: x=(-2.0944 -1.99997 -1.5708 -1.45752 -1.39626 -1.0472 -0.698132 -0.526391 -0.349066 -0.174533 0 0.00017453 0.00034907 0.0279253 0.0872665 0.174533 2.0944)
              y=(0.0155805 0.0179938 0.0275081 0.0296564 0.0307615 0.0365695 0.0422074 0.0450902 0.048391 0.0534299 0.0617576 0.0617669 0.0617762 0.0633083 0.066994 0.0733035 0.0573481)
        y_location: MultiplierFunction: scale=0.9603604
          SimmSpline: x=(-2.0944 -1.99997 -1.5708 -1.45752 -1.39626 -1.0472 -0.698132 -0.526391 -0.349066 -0.174533 0 0.00017453 0.00034907 0.0279253 0.0872665 0.174533 2.0944)
              y=(0.0234116 0.0237613 0.0251141 0.0252795 0.0253146 0.0249184 0.0242373 0.0238447 0.0234197 0.0227644 0.020984 0.0209814 0.0209788 0.0205225 0.0191754 0.0159554 -0.0673774)
        z_location: MultiplierFunction: scale=0.9290137
          SimmSpline: x=(-2.0944 0.1745) y=(-0.0014 -0.0014)
      PathWrap: wrap_object=TRO_l method=hybrid
    Millard2012EquilibriumMuscle vasti_l: max_isometric_force=5000 optimal_fiber_length=0.08741497
        tendon_slack_length=0.1366487 pennation_angle_at_optimal=0.05235988
      PathPoint vas_int_l-P1: femur_l (0.02944205 -0.1924255 -0.03184981)
      PathPoint vas_int_l-P2: femur_l (0.03401065 -0.2084277 -0.02928127)
      ConditionalPathPoint vas_int_l-P3: femur_l (0.03482284 -0.4030535 -0.005650772)
          socket_coordinate=/jointset/knee_l/knee_angle_l range=(-2.61799 -1.42)
      MovingPathPoint vas_int_l-P4: tibia_l socket_x_coordinate=/jointset/knee_l/knee_angle_l
          socket_y_coordinate=/jointset/knee_l/knee_angle_l socket_z_coordinate=/jointset/knee_l/knee_angle_l
        x_location: MultiplierFunction: scale=0.9498287
          SimmSpline: x=(-2.0944 -1.99997 -1.5708 -1.45752 -1.39626 -1.0472 -0.698132 -0.526391 -0.349066 -0.174533 0 0.00017453 0.00034907 0.0279253 0.0872665 0.174533 2.0944)
              y=(0.0082733 0.0106866 0.0202042 0.022353 0.0234583 0.0292715 0.0349465 0.037871 0.0412569 0.0465287 0.0554632 0.0554735 0.0554837 0.0571717 0.061272 0.0684368 0.0648818)
        y_location: MultiplierFunction: scale=0.9603604
          SimmSpline: x=(-2.0944 -1.99997 -1.5708 -1.45752 -1.39626 -1.0472 -0.698132 -0.526391 -0.349066 -0.174533 0 0.00017453 0.00034907 0.0279253 0.0872665 0.174533 2.0944)
              y=(0.025599 0.0259487 0.0273124 0.0274796 0.0275151 0.0271363 0.0265737 0.0263073 0.0261187 0.0260129 0.0252923 0.0252911 0.0252898 0.0250526 0.0242191 0.0218288 -0.0685706)
        z_location: MultiplierFunction: scale=0.9290137
          SimmSpline: x=(-2.0944 2.0944) y=(-0.0018 -0.0018)
    Millard2012EquilibriumMuscle gastroc_l: max_isometric_force=2500 optimal_fiber_length=0.05810533
        tendon_slack_length=0.3776846 pennation_angle_at_optimal=0.296706
      PathPoint med_gas_l-P1: femur_l (-0.01928962 -0.3929522 0.02414421)
      ConditionalPathPoint med_gas_l-P2: femur_l (-0.0304573 -0.4022534 0.02650726)
          socket_coordinate=/jointset/knee_l/knee_angle_l range=(-0.785398 0.174533)
      PathPoint med_gas_l-P3: calcn_l (0 0.03614654 0.00622371)
    Millard2012EquilibriumMuscle soleus_l: max_isometric_force=5137 optimal_fiber_length=0.04872392
        tendon_slack_length=0.2436196 pennation_angle_at_optimal=0.4363323
      PathPoint P1: tibia_l (-0.002279589 -0.1472232 -0.006595998)
      PathPoint P2: calcn_l (0 0.03614654 0.00622371)
    Millard2012EquilibriumMuscle tib_ant_l: max_isometric_force=3000 optimal_fiber_length=0.09863078
        tendon_slack_length=0.2244353 pennation_angle_at_optimal=0.08726646
      PathPoint P1: tibia_l (0.01700193 -0.1559625 -0.01068366)
      PathPoint P2: tibia_l (0.03124936 -0.3794384 0.01644354)
      PathPoint P3: calcn_l (0.1372083 0.02075511 0.03581569)
  MarkerSet:
    Marker STRN: torso (0.1007667 0.173952 0.004109849)
    Marker RSHO: torso (0.01000313 0.3984321 0.1591633) fixed=true
    Marker LSHO: torso (0.01303131 0.3984856 -0.1584017) fixed=true
    Marker RASI: pelvis (0.01463989 0.01352911 0.1231309) fixed=true
    Marker LASI: pelvis (0.01554225 0.0131162 -0.1203215) fixed=true
    Marker SACR: pelvis (-0.1487573 0.02298466 0.002146903) fixed=true
    Marker RGTRO: femur_r (0.007301376 0.01306215 0.1009954)
    Marker RTHI: femur_r (0.06041745 -0.1626003 0.08847687)
    Marker RKNE: femur_r (-0.0004279332 -0.4243002 0.05187629) fixed=true
    Marker RTIB: tibia_r (0.01493446 -0.2585553 0.06161169)
    Marker RANK: tibia_r (-0.006455243 -0.3974584 0.05639714) fixed=true
    Marker RHEEL: calcn_r (-0.02310818 0.01824537 -0.00699889) fixed=true
    Marker RMT5: toes_r (-0.04019795 0.01300512 0.06216502) fixed=true
    Marker RTOE: toes_r (0.0768645 0.01751392 -0.01610938)
    Marker LGTRO: femur_l (0.02785665 0.03304278 -0.07501251)
    Marker LTHI: femur_l (0.05110508 -0.2997516 -0.05213145)
    Marker LKNE: femur_l (0.002564408 -0.4244335 -0.04995707) fixed=true
    Marker LTIB: tibia_l (0.02106792 -0.1431101 -0.05419422)
    Marker LANK: tibia_l (-0.00673358 -0.397103 -0.05484869) fixed=true
    Marker LHEEL: calcn_l (-0.02310818 0.01830116 0.00699889) fixed=true
    Marker LMT5: toes_l (-0.04005338 0.01354835 -0.05983975) fixed=true
    Marker LTOE: toes_l (0.0768645 0.01751392 0.01610938)
    Marker CLAV: torso (0.09558761 0.3303618 0.004766967)
    Marker T10: torso (-0.1119458 0.2081359 0.01603241)
    Marker NAVE: torso (0.1457568 -0.01648744 0.02188373)
    Marker RPSI: pelvis (-0.1490238 0.04064238 0.06871493)
    Marker LPSI: pelvis (-0.1544426 0.04116596 -0.02188721)
    Marker RHEEU: calcn_r (-0.0199269 0.03760023 -0.008575892) fixed=true
    Marker LHEEU: calcn_l (-0.019872 0.03839619 0.01131507) fixed=true
    Marker LMT1: toes_l (0.00796077 0.02802312 0.02645783) fixed=true
    Marker RMT1: toes_r (0.007653082 0.02801505 -0.0248812) fixed=true
    Marker RCAL: calcn_r (0.02073669 0.01449709 0.04605169)
    Marker LCAL: calcn_l (0.02073669 0.01449709 -0.04605169)
  ContactGeometrySet:
    ContactSphere heel_r: socket_frame=/bodyset/talus_r location=(-0.06 -0.0702 0) radius=0.01
    ContactSphere heel_l: socket_frame=/bodyset/talus_l location=(-0.06 -0.0702 0) radius=0.01
    ContactSphere front_r: socket_frame=/bodyset/talus_r location=(0.1326 -0.0702 0.005217921) radius=0.01
    ContactSphere front_l: socket_frame=/bodyset/talus_l location=(0.1326 -0.0702 0.005217921) radius=0.01
    ContactHalfSpace floor: socket_frame=/ground orientation=(0 0 -1.570796)
